*Heading
File generated by TexGen v3.13.1
************
*** MESH ***
************
*Node
1, 0, 0, -0.0805
2, 2.24, 0, -0.0805
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*Element, Type=DC3D8
1, 2, 8, 7, 1, 38, 44, 43, 37
2, 3, 9, 8, 2, 39, 45, 44, 38
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********************
*** ORIENTATIONS ***
********************
** Orientation vectors
** 1st vector represents the fibre direction
** 2nd vector is an arbitrary vector perpendicular to the first
*Distribution Table, Name=TexGenOrientationVectors
COORD3D,COORD3D
*Distribution, Location=Element, Table=TexGenOrientationVectors, Name=TexGenOrientationVectors, Input=TexGen_generated_test.ori
*Orientation, Name=TexGenOrientations, Definition=coordinates
TexGenOrientationVectors
1, 0
********************
*** ELEMENT SETS ***
********************
** TexGen generates a number of element sets:
** All - Contains all elements
** Matrix - Contains all elements belonging to the matrix
** YarnX - Where X represents the yarn index
*ElSet, ElSet=AllElements, Generate
1, 125, 1
*ElSet, ElSet=Matrix
3, 8, 13, 18, 23, 36
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*ElSet, ElSet=Yarn0
26, 27, 28, 29, 30
*ElSet, ElSet=Yarn1
76, 77, 78, 79, 80
*ElSet, ElSet=Yarn2
31, 32, 33, 34, 35
*ElSet, ElSet=Yarn3
81, 82, 83, 84, 85
*ElSet, ElSet=Yarn5
41, 42, 43, 44, 45
*ElSet, ElSet=Yarn7
46, 47, 48, 49, 50
*ElSet, ElSet=Yarn10
1, 6, 11, 16, 21
*ElSet, ElSet=Yarn11
51, 56, 61, 66, 71
*ElSet, ElSet=Yarn13
2, 7, 12, 17, 22
*ElSet, ElSet=Yarn14
52, 57, 62, 67, 72
*ElSet, ElSet=Yarn16
4, 9, 14, 19, 24
*ElSet, ElSet=Yarn17
54, 59, 64, 69, 74
*ElSet, ElSet=Yarn19
5, 10, 15, 20, 25
*ElSet, ElSet=Yarn20
55, 60, 65, 70, 75
*****************
*** NODE SETS ***
*****************
** AllNodes - Node set containing all elements
*NSet, NSet=AllNodes, Generate
1, 216, 1
*****************
*Solid Section, ElSet=Matrix, Material=Mat0
1.0,
*Solid Section, ElSet=Yarn0, Material=Mat1, Orientation=TexGenOrientations
1.0,
*Solid Section, ElSet=Yarn1, Material=Mat1, Orientation=TexGenOrientations
1.0,
*Solid Section, ElSet=Yarn2, Material=Mat1, Orientation=TexGenOrientations
1.0,
*Solid Section, ElSet=Yarn3, Material=Mat1, Orientation=TexGenOrientations
1.0,
*Solid Section, ElSet=Yarn4, Material=Mat1, Orientation=TexGenOrientations
1.0,
*Solid Section, ElSet=Yarn5, Material=Mat1, Orientation=TexGenOrientations
1.0,
*Solid Section, ElSet=Yarn6, Material=Mat1, Orientation=TexGenOrientations
1.0,
*Solid Section, ElSet=Yarn7, Material=Mat1, Orientation=TexGenOrientations
1.0,
*Solid Section, ElSet=Yarn8, Material=Mat1, Orientation=TexGenOrientations
1.0,
*Solid Section, ElSet=Yarn9, Material=Mat1, Orientation=TexGenOrientations
1.0,
*Solid Section, ElSet=Yarn10, Material=Mat1, Orientation=TexGenOrientations
1.0,
*Solid Section, ElSet=Yarn11, Material=Mat1, Orientation=TexGenOrientations
1.0,
*Solid Section, ElSet=Yarn12, Material=Mat1, Orientation=TexGenOrientations
1.0,
*Solid Section, ElSet=Yarn13, Material=Mat1, Orientation=TexGenOrientations
1.0,
*Solid Section, ElSet=Yarn14, Material=Mat1, Orientation=TexGenOrientations
1.0,
*Solid Section, ElSet=Yarn15, Material=Mat1, Orientation=TexGenOrientations
1.0,
*Solid Section, ElSet=Yarn16, Material=Mat1, Orientation=TexGenOrientations
1.0,
*Solid Section, ElSet=Yarn17, Material=Mat1, Orientation=TexGenOrientations
1.0,
*Solid Section, ElSet=Yarn18, Material=Mat1, Orientation=TexGenOrientations
1.0,
*Solid Section, ElSet=Yarn19, Material=Mat1, Orientation=TexGenOrientations
1.0,
*Solid Section, ElSet=Yarn20, Material=Mat1, Orientation=TexGenOrientations
1.0,
*Solid Section, ElSet=Yarn21, Material=Mat1, Orientation=TexGenOrientations
1.0,
************************************
*** PERIODIC BOUNDARY CONDITIONS ***
************************************
*** ConstraintsDriver0 = e_x
*** ConstraintsDriver1 = e_y
*** ConstraintsDriver2 = e_z
*** ConstraintsDriver3 = e_xy
*** ConstraintsDriver4 = e_xz
*** ConstraintsDriver5 = e_yz
*Node
217, 0, 0, 0
*NSet, NSet=ConstraintsDriver0
217
*Node
218, 0, 0, 0
*NSet, NSet=ConstraintsDriver1
218
*Node
219, 0, 0, 0
*NSet, NSet=ConstraintsDriver2
219
*Node
220, 0, 0, 0
*NSet, NSet=ConstraintsDriver3
220
*Node
221, 0, 0, 0
*NSet, NSet=ConstraintsDriver4
221
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**
** STEP: Heating Step
**
*Step, name="Heating Step", nlgeom=NO
Apply heat in this step
*Heat Transfer, steady state, deltmx=0.
1., 1., 1e-05, 1.,
**
** BOUNDARY CONDITIONS
**
** Name: Const temp surf 1 Type: Temperature
*Boundary
Set-1, 11, 11, 400.
** Name: Const temp surf2 Type: Temperature
*Boundary
Set-2, 11, 11, 300.
**
** INTERACTIONS
**** Interaction: Convection 1
*Sfilm
Surf-1, F, 200., 13.
** Interaction: Convection 2
*Sfilm
Surf-2, F, 200., 13.
** Interaction: Convection 3
*Sfilm
Surf-3, F, 200., 13.
** Interaction: Convection 4
*Sfilm
Surf-4, F, 200., 13.
** Interaction: Radiation 1
*Sradiate
Surf-5, R, 200., 0.78
** Interaction: Radiation 2
*Sradiate
Surf-6, R, 200., 0.78
** Interaction: Radiation 3
*Sradiate
Surf-7, R, 200., 0.78
** Interaction: Radiation 4
*Sradiate
Surf-8, R, 200., 0.78
**
** OUTPUT REQUESTS
**
*Restart, write, frequency=0
**
** FIELD OUTPUT: F-Output-1
**
*Output, field, variable=PRESELECT
*Output, history, frequency=0
*End Step
***************************
